r := 1
step := 0.5
t_param := 126.13*π/180
C(t) := [cos(t)*r; sin(t)*r; step*t]
C'(t) := d/dt(C(t)) → [-1.0*sin(t); cos(t); 0.5]
# [3D plot: C(t)]
C'(t_param) → [-0.807681270663; -0.589619339082; 0.5]
